<Lems>

<!-- Example of conductance based cell with Na, K (incl [Ca2+] dependent) & Ca channels and a pool of Ca -->

<!-- Specify which component to run -->
    <Target component="sim1"/>

<!-- Include core NeuroML2 ComponentType definitions -->
    <Include file="Cells.xml"/>
    <Include file="Networks.xml"/>
    <Include file="Simulation.xml"/>

    <Include file="concMod1.nml"/>
    <Include file="CaLVA.nml"/>
    <Include file="NaF.nml"/>
    <Include file="Pas.nml"/>
    <Include file="SomaNernst.nml"/>

    <pulseGenerator id="pulseGen1" delay="100ms" duration="100ms" amplitude="-0.01 nA" />
    <pulseGenerator id="pulseGen2" delay="500ms" duration="100ms" amplitude="0.01 nA" />

    <voltageClamp id="vClamp1" delay="150ms" duration="50ms" targetVoltage="10mV" seriesResistance="1ohm"/>

    <network id="net1" type="networkWithTemperature" temperature="32degC">
        <population id="hhpop" component="SomaNernst" size="1"/>
        <explicitInput target="hhpop[0]" input="pulseGen1"/>
        <explicitInput target="hhpop[0]" input="pulseGen2"/>
    </network>

        <!-- End of NeuroML2 content -->

    <Simulation id="sim1" length="800ms" step="0.01ms" target="net1">

        <Display id="d1" title="Nernst Test: Voltage (mV)" xmin="-50" xmax="850" ymin="-90" ymax="-40" timeScale="1ms">
            <Line id="v" quantity="hhpop[0]/v" scale="1mV"  color="#ffffff" timeScale="1ms"/>
            <!--<Line id="l5" quantity="hhpop[0]/biophys/membraneProperties/CaLVA_all/erev" scale="1uA_per_cm2"  color="#00ff00" save="NML2_LEMS_cae.dat"/>-->
        </Display>

        <Display id="d2" title="Nernst Test: rate variables" timeScale="1ms" xmin="-50" xmax="850" ymin="-0.01" ymax="1.1">

            <Line id="CaLVA/m" quantity="hhpop[0]/biophys/membraneProperties/CaLVA_all/CaLVA/m/q" scale="1"  color="#770fff" timeScale="1ms"/>
            <Line id="CaLVA/h" quantity="hhpop[0]/biophys/membraneProperties/CaLVA_all/CaLVA/h/q" scale="1"  color="#55f00f" timeScale="1ms"/>
            <Line id="NaF/m" quantity="hhpop[0]/biophys/membraneProperties/NaF_all/NaF/m/q" scale="1"  color="#77000f" timeScale="1ms"/>
            <Line id="NaF/h" quantity="hhpop[0]/biophys/membraneProperties/NaF_all/NaF/h/q" scale="1"  color="#aaaa0f" timeScale="1ms"/>

        </Display>

        <Display id="dc" title="Nernst Test: Ca concentration (mM)" timeScale="1ms" xmin="-50" xmax="850" ymin="0" ymax="10e-5">
            <Line id="caConc" quantity="hhpop[0]/caConc" scale="1 mM"  color="#ffffff" timeScale="1ms"/>
        </Display>

        <Display id="de" title="Nernst Test: Ca rev pot (mV)" timeScale="1ms" xmin="-50" xmax="850" ymin="0" ymax="150">
            <Line id="erev" quantity="hhpop[0]/biophys/membraneProperties/CaLVA_all/erev" scale="1 mV"  color="#ffffff" timeScale="1ms"/>
        </Display>
<!--
        <Display id="d3" title="Nernst Test: current densities (uA_per_cm2)" timeScale="1ms" xmin="-50" xmax="850" ymin="-0.01" ymax="1.1">
            <Line id="CaLVA/i" quantity="hhpop[0]/biophys/membraneProperties/CaLVA_all/iDensity" scale="1mA_per_cm2"  color="#00ff00" timeScale="1ms"/>
            <Line id="NaF/i" quantity="hhpop[0]/biophys/membraneProperties/NaF_all/iDensity" scale="1mA_per_cm2"  color="#00ffff" timeScale="1ms"/>
        </Display>

        <Display id="d4" title="Nernst Test: current totals" timeScale="1ms">
            <Line id="l0" quantity="hhpop[0]/pulseGen1/i" scale="1nA"  color="#dddddd" save="NML2_LEMS_naigc1.dat"/>
            <Line id="l1" quantity="hhpop[0]/pulseGen2/i" scale="1nA"  color="#dd3333" save="NML2_LEMS_naigc2.dat"/>
            <Line id="l2" quantity="hhpop[0]/iCa" scale="1nA"  color="#00aa00" save="NML2_LEMS_naic2.dat"/>
        </Display> -->
<!-- -
        <Display id="d5" title="Nernst Test: taus" timeScale="1ms">
            <Line id="l01" quantity="hhpop[0]/biophys/membraneProperties/CaLVA_all/CaLVA/m/tau" scale="1ms"  color="#ddd222" save="NML2_LEMS_mtau.dat"/>
            <Line id="l02" quantity="hhpop[0]/biophys/membraneProperties/CaLVA_all/CaLVA/h/tau" scale="1ms"  color="#555222" save="NML2_LEMS_htau.dat"/>
        </Display>-->

    </Simulation>

</Lems>
