<?xml version="1.0" encoding="UTF-8"?>
<channelml xmlns="http://morphml.org/channelml/schema"
    xmlns:xsi="http://www.w3.org/2001/XMLSchema-instance"
    xmlns:meta="http://morphml.org/metadata/schema"
    xsi:schemaLocation="http://morphml.org/channelml/schema http://www.neuroml.org/NeuroMLValidator/NeuroMLFiles/Schemata/v1.8.1/Level2/ChannelML_v1.8.1.xsd"
    units="SI Units">

    <meta:notes>...</meta:notes>

    <channel_type name="fKdr">

        <status value="stable">
            <meta:comment>Tested this version against original GENESIS implementation and matched on GENESIS, MOOSE, NEURON and LEMS</meta:comment>
            <meta:contributor>Padraig Gleeson</meta:contributor>
        </status>

        <meta:notes>....</meta:notes>

        <meta:authorList>
            <meta:modelTranslator>
                <meta:name>Padraig Gleeson</meta:name>
                <meta:institution>UCL</meta:institution>
                <meta:email>p.gleeson - at - ucl.ac.uk</meta:email>
            </meta:modelTranslator>
        </meta:authorList>

        <meta:neuronDBref>
            <meta:modelName>K channels</meta:modelName>
            <meta:uri>http://senselab.med.yale.edu/senselab/NeuronDB/channelGene2.htm#table3</meta:uri>
        </meta:neuronDBref>

        <current_voltage_relation cond_law="ohmic" ion="k" default_gmax="36" default_erev="-0.09">

            <gate name="n" instances="4">
                <closed_state id="n0"/>
                <open_state id="n"/>

                <time_course name="tau" from="n0" to="n" expr_form="generic" expr="0.0001 + (0.0139/((exp ( ((-0.040) - v)/ (-0.012) ) ) + (exp (-1 * (( (-0.040) - v)/ (-0.013) )))))"/>

                <steady_state name="inf" from="n0" to="n" expr_form="sigmoid" rate="1" scale="-0.0078" midpoint="-0.040"/>

            </gate>
        </current_voltage_relation>

        <impl_prefs>
            <table_settings max_v="0.1" min_v="-0.15" table_divisions="300"/>
        </impl_prefs>

    </channel_type>
</channelml>
